P_2 := 7.25*10^6
P_а := 0.02*10^6
# 3. Построение газодинамического тракта
I_уп := 3609.98
P_п := 700
F`_кр := 0.0002523
F`_а := 0.0099085
m_р := P_п*10^3/I_уп = 193.907
φ_с := 0.98
F_кр := F`_кр*m_р = 0.0489227
φ_β := 0.98
F_крд := F_кр/φ_с = 0.0499211
φ := φ_с*φ_β = 0.9604
F_а := F`_а*m_р = 1.92133
F_ад := F_а/φ_с^2 = 2.00055
L_пр := 1.5
V_кс := L_пр*F_крд = 0.0748817
d_кс := round(nthroot(4*V_кс/π, 3), 3) = 0.457
L_кс := d_кс = 0.457
R_кр := round(sqrt(F_крд/π), 3) = 0.126
D_кр := 2*R_кр = 0.252
R_а := round(sqrt(F_ад/π), 4) = 0.798
R_а*2 = 1.596
R_с1 := 0.25*d_кс = 0.11425
R_с2 := 0.7*D_кр = 0.1764
R_с3 := 0.45*R_кр = 0.0567
R_а/R_кр = 6.33333
L_a := 15.5*R_кр = 1.953
# 5. Расчет смесительной головки
ρ_о := 1135
ρ_г := 424
υ := 3.5504
m_р = 193.907
m_др := m_р/φ = 201.902
m_дг := m_др/(1 + υ) = 44.3702
m_до := υ*m_др/(1 + υ) = 157.532
m_дг + m_до = 201.902
# 5.2 Расчет струйных форсунок для пристеночного слоя.
d_кс = 0.457
ρ_г = 424
m_дг = 44.3702
Δp_фг := 2*10^6
n_сф := π*(d_кс - 0.016)/0.015 = 92.3628
μ_ф := 0.65
m_сфг := 0.05*m_дг/n_сф = 0.0240195
F_сфг := m_сфг/(μ_ф*sqrt(2*Δp_фг*ρ_г)) = 8.97301e-7
ω_г := μ_ф*sqrt(2*Δp_фг/ρ_г) = 63.1336
d_сфг := round(sqrt(4*F_сфг/π), 4) = 0.0011
# 5.3 Расчет центробежных форсунок
# 5.3.1. Форсунки горючего
n_цфг := 187
m_цфг := 0.95*m_дг/n_цфг = 0.22541
Δp_ф := 2*10^6
μ_ф := 0.42
F_сг := m_цфг/(μ_ф*sqrt(2*Δp_ф*ρ_г)) = 1.3032e-5
A := 1
d_сг := round(sqrt(4*F_сг/π), 3) = 0.004
r_сг := d_сг/2 = 0.002
i := 2
R_вх := 1.1*r_сг = 0.0022
m_вх := m_цфг/i = 0.112705
Динамическая
r_вх := round(sqrt(R_вх*r_сг/(i*A)), 4) = 0.0015
вязкость
d_вх := 2*r_вх = 0.003
η := 102.8*10^-6
Re_вх := 4*m_цфг/(η*π*d_вх*sqrt(i)) = 658043
Для_правильной_работы_маткада
lg(λ) := 25.8/log(Re_вх)^2.58 - 2 = -1.72556
λ := 0
λ := 10^lg(λ) = 0.0188124
log(0.02) = -1.69897
A_э := R_вх*r_сг/(i*r_вх^2 + λ/2*R_вх*(R_вх - r_сг)) = 0.976879
|(A - A_э)/A|*100 = 2.31207
l_вх := 1.1*d_вх = 0.0033
l_сг := 0.5*d_сг = 0.002
h := R_вх = 0.0022
R_з := R_вх + r_вх = 0.0037
R_фг := round(sqrt(R_з^2 + l_вх^2 + 2*l_вх*sqrt(R_з^2 - R_вх^2)), 4) = 0.0066
δ := R_фг - R_з = 0.0029
# 5.3.2. Форсунки окислителя
n_цфо := 424
m_цфо := m_до/n_цфо = 0.371538
m_цфо = 0.371538
ρ_о = 1135
Δp_ф := 2*10^6
μ_ф := 0.42
F_со := m_цфо/(μ_ф*sqrt(2*Δp_ф*ρ_о)) = 1.31288e-5
A := 1
d_со := round(sqrt(4*F_со/π), 3) = 0.004
r_со := d_со/2 = 0.002
i := 3
R_вх := 1.1*r_со = 0.0022
m_вх := m_цфо/i = 0.123846
Динамическая
r_вх := round(sqrt(R_вх*r_со/(i*A)), 4) = 0.0012
вязкость
d_вх := 2*r_вх = 0.0024
η := 190*10^-6
Re_вх := 4*m_цфо/(η*π*d_вх*sqrt(i)) = 598946
Для_правильной_работы_маткада
lg(λ) := 25.8/log(Re_вх)^2.58 - 2 = -1.72052
λ := 0
λ := 10^lg(λ) = 0.0190319
A_э := R_вх*r_со/(i*r_вх^2 + λ/2*R_вх*(R_вх - r_со)) = 1.01753
|(A - A_э)/A|*100 = 1.75323
l_вх := 1.1*d_вх = 0.00264
l_со := 0.5*d_со = 0.002
h := R_вх = 0.0022
R_з := R_вх + r_вх = 0.0034
R_фо := round(sqrt(R_з^2 + l_вх^2 + 2*l_вх*sqrt(R_з^2 - R_вх^2)), 4) = 0.0057
δ := R_фо - R_з = 0.0023
# 5.4 Проверка радиусов форсунок
R_фо + R_фг = 12.3*10^-3  # м
# 6. Расчет турбонасосного агрегата
ΔP_охл := 2*10^6
P_2 = 7250000
ΔP_ф := 2*10^6
ΔP_фост := 2*10^6
P_выхг := P_2 + ΔP_охл + ΔP_ф + 2*10^6 = 13250000
P_выхо := P_2 + ΔP_ф + 2*10^6 = 11250000
P_нд := 0.5*10^6
P_вх := 0.5*10^6
P_sг := 10^5
P_sо := 10^5
# 6.1 Расчет насосов
Q_г := m_дг/ρ_г = 0.104647
m_дг = 44.3702
ρ_г = 424
H_г := (P_выхг - P_вх)/ρ_г = 30070.8
P_выхг = 13250000
c_кр := 4500
P_вх = 500000
ω_maxг := c_кр*((P_вх - P_sг)/ρ_г)^(3/4)/(298*sqrt(Q_г)) = 7946.1
ρ_о = 1135
Q_о := m_до/ρ_о = 0.138795
m_до = 157.532
P_вх = 500000
P_выхо = 11250000
H_о := (P_выхо - P_вх)/ρ_о = 9471.37
c_кр := 4500
ω_maxо := c_кр*((P_вх - P_sо)/ρ_о)^(3/4)/(298*sqrt(Q_о)) = 3296.92
ω_г := 0.95*ω_maxг = 7548.79
ω_о := 0.95*ω_maxо = 3132.07
ω_min := ω_о
ω := ω_min = 3132.07
n_sг := 193.3*ω*sqrt(Q_г)/H_г^(3/4) = 85.7665
Q_г = 0.104647
H_г = 30070.8
n_sо := 193.3*ω*sqrt(Q_о)/H_о^(3/4) = 234.931
Q_о = 0.138795
H_о = 9471.37
η_о := 0.92
η_г := 0.7
η_м := 0.9
η_н := η_о*η_г*η_м = 0.5796
Q_г = 0.104647
N_нг := Q_г*H_г*ρ_г/η_н = 2302011
ρ_г = 424
H_г = 30070.8
M_кр1 := N_нг/ω = 734.981
ρ_о = 1135
ω = 3132.07
N_но := Q_о*H_о*ρ_о/η_н = 2574264
H_о = 9471.37
M_кр2 := N_но/ω = 821.905
Q_о = 0.138795
Q_г = 0.104647
M_кр := M_кр1 + M_кр2 = 1556.89
τ := 9.4*10^8
d_в := round(nthroot(5.1*M_кр/τ, 3), 3) = 0.02
d_вт := 1.2*d_в = 0.024
# 6.2. Расчет насоса горючего
Q_од := Q_г/η_о = 0.113746
Q_г = 0.104647
η_о = 0.92
k_о := 5
D_1э := round(0.47*k_о*nthroot(Q_од/ω, 3), 3) = 0.078
D_о := round(sqrt(D_1э^2 + d_вт^2), 3) = 0.082
D_1 := D_о = 0.082
c_о := Q_од/(π/4*D_1э^2) = 23.8045
b_1 := round(0.375*D_1э^2/D_1, 3) = 0.028
u_1 := D_1*ω/2 = 128.415
D_1 = 0.082
ψ_1 := 0.85
Здесь_надо_варировать  # ψ_1
δ_1 := 0.003
чтобы_была_близка_к_конечной
z := 6
c_1m := Q_од/(π*D_1*b_1*ψ_1) = 18.5523
Q_од = 0.113746
D_1 = 0.082
b_1 = 0.028
u_1 = 128.415
β_1 := atan(c_1m/u_1) = 0.143479
β_1 = 8.22072°
Δβ_л := 12° = 0.20944
β_1л := β_1 + Δβ_л = 20.2207°
β_1л = 0.352918
ψ_1 := 1 - δ_1*z/(π*D_1*sin(β_1л)) = 0.797843
δ_1 = 0.003
z = 6
D_1 = 0.082
c_1m := Q_од/(π*D_1*b_1*ψ_1) = 19.7651
Q_од = 0.113746
b_1 = 0.028
ψ_1 = 0.797843
β_1 := atan(c_1m/u_1) = 0.152717
β_1 = 8.75006°
u_1 = 128.415
Δβ_л := 12° = 0.20944
β_1л := β_1 + Δβ_л = 0.362157
β_1л = 20.7501°
H_т := H_г/η_г = 42958.2
H_г = 30070.8
η_г = 0.7
k_н := 0.5
u_2 := sqrt(H_т/k_н) = 293.115
H_т = 42958.2
D_2' := round(2*u_2/ω, 3) = 0.187
ω = 3132.07
β_2 := 30°
z := 6.5*(D_2' + D_1)/(D_2' - D_1)*sin((β_1л + β_2)/2) = 7.13623
D_1 = 0.082
β_1л = 20.7501°
z := ceil(z) = 8
c_2m := c_1m
δ_1 = 0.003
z = 8
D_2' = 0.187
β_2 = 30°
ψ_2 := 1 - δ_1*z/(π*D_2'*sin(β_2)) = 0.918295
Q_од = 0.113746
D_2' = 0.187
c_2m = 19.7651
b_2 := round(Q_од/(π*D_2'*c_2m*ψ_2), 3) = 0.011
ψ_2 = 0.918295
ψ := 0.55 + 0.6*sin(β_2) = 0.85
ψ = 0.85
z = 8
D_1 = 0.082
D_2' = 0.187
p := 2*ψ/z*1/(1 - (D_1/D_2')^2) = 0.263088
H_T∞ := H_т*(1 + p) = 54260
H_т = 42958.2
p = 0.263088
c_2m = 19.7651
β_2 = 30°
u_2 := c_2m/(2*tan(β_2)) + sqrt((c_2m/(2*tan(β_2)))^2 + H_T∞) = 250.683
D_21' := round(2*u_2/ω, 3) = 0.16
ω = 3132.07
γ := round(|(D_21' - D_2')/D_21'|*100, 1) = 16.9
D_2' = 0.187
z := 6.5*(D_21' + D_1)/(D_21' - D_1)*sin((β_1л + β_2)/2) = 8.64225
D_1 = 0.082
β_1л = 20.7501°
β_2 = 30°
z := ceil(z) = 9
ψ_2 := 1 - δ_1*z/(π*D_21'*sin(β_2)) = 0.89257
δ_1 = 0.003
D_21' = 0.16
b_2 := round(Q_од/(π*D_21'*c_2m*ψ_2), 3) = 0.013
Q_од = 0.113746
D_21' = 0.16
c_2m = 19.7651
ψ_2 = 0.89257
ψ := 0.55 + 0.6*sin(β_2) = 0.85
p := 2*ψ/z*1/(1 - (D_1/D_21')^2) = 0.256175
z = 9
D_21' = 0.16
D_1 = 0.082
H_T∞ := H_т*(1 + p) = 53963
H_т = 42958.2
p = 0.256175
u_2 := c_2m/(2*tan(β_2)) + sqrt((c_2m/(2*tan(β_2)))^2 + H_T∞) = 250.046
c_2m = 19.7651
H_T∞ = 53963
β_2 = 30°
D_22' := round(2*u_2/ω, 3) = 0.16
ω = 3132.07
γ := round(|(D_22' - D_21')/D_22'|*100, 1) = 0
# 6.3 Расчет насоса окислителя
Q_од := Q_о/η_о = 0.150864
Q_о = 0.138795
η_о = 0.92
k_о := 5
D_1э := round(0.47*k_о*nthroot(Q_од/ω, 3), 3) = 0.086
ω = 3132.07
D_о := round(sqrt(D_1э^2 + d_вт^2), 3) = 0.089
d_вт = 0.024
D_1 := D_о = 0.089
Q_од = 0.150864
D_1э = 0.086
c_о := Q_од/(π/4*D_1э^2) = 25.9716
b_1 := round(0.375*D_1э^2/D_1, 3) = 0.031
D_1 = 0.089
u_1 := D_1*ω/2 = 139.377
ω = 3132.07
ψ_1 := 0.85
Здесь_надо_варировать  # ψ_1
δ_1 := 0.003
чтобы_была_близка_к_конечной
z := 6
c_1m := Q_од/(π*D_1*b_1*ψ_1) = 20.4769
b_1 = 0.031
ψ_1 = 0.85
Q_од = 0.150864
β_1 := atan(c_1m/u_1) = 0.145874
β_1 = 8.35795°
c_1m = 20.4769
u_1 = 139.377
Δβ_л := 5° = 0.0872665
β_1л := β_1 + Δβ_л = 13.358°
β_1л = 0.23314
ψ_1 := 1 - δ_1*z/(π*D_1*sin(β_1л)) = 0.721351
z = 6
D_1 = 0.089
δ_1 = 0.003
Q_од = 0.150864
b_1 = 0.031
c_1m := Q_од/(π*D_1*b_1*ψ_1) = 24.1289
β_1 := atan(c_1m/u_1) = 0.17142
β_1 = 9.82165°
u_1 = 139.377
Δβ_л := 5° = 0.0872665
β_1л := β_1 + Δβ_л = 0.258687
β_1л = 14.8217°
k_н := 0.5
H_о = 9471.37
η_г = 0.7
H_т := H_о/η_г = 13530.5
ω = 3132.07
u_2 := sqrt(H_т/k_н) = 164.502
H_т = 13530.5
D_2' := round(2*u_2/ω, 3) = 0.105
ω = 3132.07
β_2 := 15°
D_2' = 0.105
D_1 = 0.089
z := 6.5*(D_2' + D_1)/(D_2' - D_1)*sin((β_1л + β_2)/2) = 20.2797
β_1л = 14.8217°
z := ceil(z) = 21
c_2m := c_1m
δ_1 = 0.003
D_2' = 0.105
β_2 = 15°
ψ_2 := 1 - δ_1*z/(π*D_2'*sin(β_2)) = 0.262087
z = 21
Q_од = 0.150864
D_2' = 0.105
c_2m = 24.1289
b_2 := round(Q_од/(π*D_2'*c_2m*ψ_2), 3) = 0.072
ψ := 0.55 + 0.6*sin(β_2) = 0.705291
β_2 = 15°
z = 21
D_1 = 0.089
D_2' = 0.105
p := 2*ψ/z*1/(1 - (D_1/D_2')^2) = 0.238581
H_T∞ := H_т*(1 + p) = 16758.7
H_т = 13530.5
u_2 := c_2m/(2*tan(β_2)) + sqrt((c_2m/(2*tan(β_2)))^2 + H_T∞) = 182.087
c_2m = 24.1289
β_2 = 15°
D_21' := round(2*u_2/ω, 3) = 0.116
ω = 3132.07
D_2' = 0.105
γ := round(|(D_21' - D_2')/D_21'|*100, 1) = 9.5
z := 6.5*(D_21' + D_1)/(D_21' - D_1)*sin((β_1л + β_2)/2) = 12.699
D_1 = 0.089
β_1л = 14.8217°
β_2 = 15°
z := ceil(z) = 13
ψ_2 := 1 - δ_1*z/(π*D_21'*sin(β_2)) = 0.586514
δ_1 = 0.003
D_21' = 0.116
Q_од = 0.150864
D_21' = 0.116
c_2m = 24.1289
b_2 := round(Q_од/(π*D_21'*c_2m*ψ_2), 3) = 0.029
ψ_2 = 0.586514
ψ := 0.55 + 0.6*sin(β_2) = 0.705291
p := 2*ψ/z*1/(1 - (D_1/D_21')^2) = 0.263787
D_1 = 0.089
D_21' = 0.116
H_T∞ := H_т*(1 + p) = 17099.7
H_т = 13530.5
c_2m = 24.1289
β_2 = 15°
u_2 := c_2m/(2*tan(β_2)) + sqrt((c_2m/(2*tan(β_2)))^2 + H_T∞) = 183.325
H_T∞ = 17099.7
D_22' := round(2*u_2/ω, 3) = 0.117
ω = 3132.07
γ := round(|(D_22' - D_21')/D_22'|*100, 1) = 0.9
D_21' = 0.116
# 7. ЖГГ, Турбина ТНА
N_нг = 2302011
N_но = 2574264
N_т := N_нг + N_но = 4876275
Т_гг := 1199.99
p_вхд := 7.25*10^6
p_вых := 0.2*10^6
R := 624.036
γ := 1.14698
L_ад := γ/(γ - 1)*R*Т_гг*(1 - (p_вых/p_вхд)^(γ/(γ - 1))) = 5843659
c_ад := sqrt(2*L_ад) = 3418.67
u := 0.15*c_ад = 512.801
ω = 3132.07
r := round(u/ω, 3) = 0.164
d := 2*r = 0.328
η_i := 0.4
η_м = 0.9
η_т := η_i*η_м = 0.36
N_т = 4876275
L_ад = 5843659
m_гг := N_т/(L_ад*η_т) = 2.31793
η_т = 0.36
ν_гг := 0.7584
m_огг := ν_гг*m_гг/(1 + ν_гг) = 0.999727
m_ггг := 1*m_гг/(1 + ν_гг) = 1.31821
m_огг + m_ггг = 2.31793
# 8. Построение высотной и дроссельной характеристик ЖРД
β := 1828.92
P_п := 700*10^3
P_2 = 7250000
F_крд = 0.0499211
F_ад = 2.00055
P_a
K_п := P_п/(F_крд*P_2) = 1.93409
P_н := 101325
m_др = 201.902
K_п*β = 3537.29
w_e := K_п*β = 3537.29
F_ад*P_н = 202706
P_з(m) := w_e*m - F_ад*P_н
P_пп(m) := w_e*m
χ := 0.18
P_а = 20000
m_min := F_крд/β*χ*P_н*(P_2/P_а) = 180.462
P_а = 20000
P_н = 101325
P_з(0)/10^3 = -202.706
# Дроссельная характеристика
# [plot: P_з(m)/10^3, P_пп(m)/10^3 vs m]
# P, кПа
# -P_з(m)  -P_пп(m)
# m, кг/c
m_min
# [Excel component]
    H := excel["A2:A21"]
    p := excel["B2:B21"]
P_п = 700000
F_ад = 2.00055
P := P_п - p*F_ад
max(P) = 699998
P[0]/10^3 = 497.294
# [plot: P/10^3 vs H]
# P, кПа
# H, км
